// COMSOL Multiphysics 6.4.0.293 model "tuning_fork (1).mph"
// Tuning Fork
// This example computes the fundamental eigenfrequency and eigenmode for a tuning fork. When correctly designed, the tuning fork vibrates at 440 Hz, a frequency known as standard concert pitch.
// Outline of the model tree

Parameters
  L = 78[mm]  // Cylinder length
  Rb = 7.5[mm]  // Base radius
  Rp = 2.5[mm]  // Prong radius
  Ls = 20[mm]  // Stem length
  Rh = 4[mm]  // Handle radius
  z0 = -22.5[mm]  // Vertical displacement, handle

Geometry
  geom1 "Geometry 1" (3D, length unit mm)
    cone1: Cone | r = Rp; h = Ls; ang = 2; pos = {Rb, 0, -Rb}; axis = {0, 0, -1}; axistype = cartesian
    sph1: Sphere | r = Rh; pos = {Rb, 0, z0-Rb}
    tor1: Torus | rmaj = Rb; rmin = Rp; angle = 180; pos = {Rb, 0, 0}; axis = {0, 1, 0}; axistype = cartesian; rot = -90
    uni1: Union | input = cone1, sph1, tor1; intbnd = off; face = all
    cyl1: Cylinder | r = Rp; h = L
    cyl2: Cylinder | r = Rp; h = L; pos = {2*Rb, 0, 0}
    fin: Finalize "Form Union"
    ige1: IgnoreEdges | input = fin(1) edges 22, 23, 29, 32, 33, 39, 42, 43

Materials
  mat1: Common "Steel AISI 4340" on all domains
    def: def "Basic"
      relpermeability = 1
      electricconductivity = 4.032e6[S/m]
      thermalexpansioncoefficient = 12.3e-6[1/K]
      heatcapacity = 475[J/(kg*K)]
      relpermittivity = 1
      density = 7850[kg/m^3]
      thermalconductivity = 44.5[W/(m*K)]
    Enu: Enu "Young's modulus and Poisson's ratio"
      E = 205[GPa]
      nu = 0.28

Physics
  solid: SolidMechanics on all domains
    dependent variable u = {u, v, w}
    lemm1: LinearElasticModel "Linear Elastic Material 1" (default)
    free1: Free (default)
    init1: init "Initial Values 1" (default)

Mesh
  mesh1 "Mesh 1"
    size: MeshSizeDefault | hauto = 4
    ftri1: FreeTri "Free Triangular 1" on boundaries 6, 24
    swe1: Sweep "Swept 1" on domains 1, 3
      dis1: Distribution on domains 1, 3 | numelem = 50
    ftet1: FreeTet "Free Tetrahedral 1" on remaining entities

Studies
  std1 "Study 1"
    param: Parametric "Parametric Sweep" | pname = L; plistarr = range(0.078,1e-4,0.0795); punit = m
    eig: Eigenfrequency | neigs = 1; shift = 440

Solver configurations
  sol1 "Solution 1" (study std1)
    v1: Variables "Dependent Variables 1"
    e1: Eigenvalue "Eigenvalue Solver 1"
      rtol = 1e-3
      neigs = 1
      shift = 440
      eigvfunscale = maximum
      eigvfunscaleparam = 1.14E-7
      filtereigexpression = real(freq)+1e-6>0
      filtereigdescription = Damped natural frequency
      dDef: Direct
  sol2 "Parametric Solutions 1" (study std1)

Datasets
  dset1: Solution | solution = sol1
  dset2: Solution | solution = sol2

Derived values
  gev1: EvalGlobal "Global Evaluation 1"
    data = dset2
    table = tbl1
    tablecols = inner
    expr = solid.freq
    descr = Frequency

Evaluation groups
  std1EvgFrq: EvaluationGroup "Eigenfrequencies (Study 1)" | data = dset2
    gev1: EvalGlobal "Global Evaluation 1"
      expr = {2*pi*freq, imag(freq)/abs(freq), abs(freq)/imag(freq)/2}
      unit = {rad/s, 1, 1}
      descr = {Angular frequency, Damping ratio, Quality factor}

Plots
  pg1: PlotGroup3D "Mode Shape (solid)" | data = dset2
    surf1: Surface | expr = solid.disp
      def: Deform "Deformation" | expr = {u, v, w}